// SBML level 2 version 3

model Akman2008_Circadian_Clock_Model2()
  // This model 2 described in the supplement of the article below. It is parameterized for the WT at 24°C. To reproduce figure 6 the results have to be rescaled to circadian time by multiplying time by 24/tau, with tau being the period of the free-running oscillator. For the wild-type parameter set tau is equal to 22.7149.
  // Article:
  // Isoform switching facilitates period control in the Neurospora crassa circadian clock.
  // Akman OE, Locke JC, Tang S, Carré I, Millar AJ, Rand DA. Mol Syst Biol. 2008;4:164. Epub 2008 Feb 12. PMID: 18277380, doi:10.1038/msb.2008.5
  // Abstract:
  // A striking and defining feature of circadian clocks is the small variation in period over a physiological range of temperatures. This is referred to as temperature compensation, although recent work has suggested that the variation observed is a specific, adaptive control of period. Moreover, given that many biological rate constants have a Q(10) of around 2, it is remarkable that such clocks remain rhythmic under significant temperature changes. We introduce a new mathematical model for the Neurospora crassa circadian network incorporating experimental work showing that temperature alters the balance of translation between a short and long form of the FREQUENCY (FRQ) protein. This is used to discuss period control and functionality for the Neurospora system. The model reproduces a broad range of key experimental data on temperature dependence and rhythmicity, both in wild-type and mutant strains. We present a simple mechanism utilising the presence of the FRQ isoforms (isoform switching) by which period control could have evolved, and argue that this regulatory structure may also increase the temperature range where the clock is robustly rhythmic.
  // This model originates from BioModels Database: A Database of Annotated Published Models. It is copyright (c) 2005-2009 The BioModels Team.
  // For more information see the terms of use.
  // To cite BioModels Database, please use Le Novère N., Bornstein B., Broicher A., Courtot M., Donizelli M., Dharuri H., Li L., Sauro H., Schilstra M., Shapiro B., Snoep J.L., Hucka M. (2006) BioModels Database: A Free, Centralized Database of Curated, Published, Quantitative Kinetic Models of Biochemical and Cellular Systems Nucleic Acids Res., 34: D689-D691.
  // biomodels.db:MODEL8306015773
  // biomodels.db:BIOMD0000000214
  // isDescribedBy pubmed:18277380
  // isDerivedFrom biomodels.db:BIOMD0000000299
  // isVersionOf GO:0007623 GO:0042752
  // hasTaxon taxonomy:5141

  // Compartments:
  compartment cytosol = 1;  // GO:0005829
  compartment nucleus = 1;  // GO:0005634

  // Species:
  species E1F in cytosol = 0.43076; E1F is "s-Frq_1";  // isVersionOf uniprot:P19970
  species E1Fp in cytosol = 0.45583; E1Fp is "l-Frq_1";  // isVersionOf uniprot:P19970
  species E1W in cytosol = 5.84748; E1W is "WC-1_1";  // isVersionOf uniprot:Q01371
  species E2F in cytosol = 0.10647; E2F is "s-Frq_2";  // isVersionOf uniprot:P19970
  species E2Fp in cytosol = 0.09872; E2Fp is "l-Frq_2";  // isVersionOf uniprot:P19970
  species E2W in cytosol = 5.70265; E2W is "WC-1_2";  // isVersionOf uniprot:Q01371
  species MF in nucleus = 0.6935; MF is "Frq mRNA";  // isVersionOf CHEBI:33699 kegg.compound:C00046; encodes uniprot:P19970
  species MW in nucleus = 1.2689; MW is "WC-1 mRNA";  // isVersionOf CHEBI:33699 kegg.compound:C00046; encodes uniprot:Q01371
  species PF in nucleus = 0.06565; PF is "s-Frq";  // isVersionOf uniprot:P19970
  species PFp in nucleus = 0.07719; PFp is "l-Frq";  // isVersionOf uniprot:P19970
  species PW in nucleus = 26.4393; PW is "WC-1";  // isVersionOf uniprot:Q01371
  species PWL in nucleus = 0; PWL is "WC-1*";  // isVersionOf uniprot:Q01371
  species sFrq_tot in nucleus; sFrq_tot is "tot s-Frq";  // isVersionOf uniprot:P19970
  species lFrq_tot in nucleus; lFrq_tot is "tot l-Frq";  // isVersionOf uniprot:P19970
  species Frq_tot in nucleus; Frq_tot is "tot Frq";  // isVersionOf uniprot:P19970
  species WC1_tot in nucleus; WC1_tot is "tot WC-1";  // isVersionOf uniprot:Q01371

  // Parameters:
  a1 = 24.9736;
  a2 = 3.59797;
  a3 = 0.2834;
  a4 = 0.46227;
  a5 = 0.02917;
  a6 = 0.20695;
  a7 = 3.02856;
  b1 = 0.00209;
  b2 = 2.13476;
  b3 = 0.08039;
  b4 = 0.45859;
  b5 = 0.13056;
  b7 = 2.96739;
  b8 = 0.11167;
  b9 = 81.10381;
  b10 = 93.03664;
  b6 = 0;
  d1 = 1.43549;
  d2 = 0.21251;
  d3 = 0.50309;
  d4 = 3.36641;
  d5 = 0.41085;
  f1 = 0.09292;
  f2 = 0.14979;
  gam1 = 0.34603;
  gam2 = 0.00028;
  r1 = 2.71574;
  r2 = 35.40005;
  n = 1.02419;
  m = 1.34979;
  k = 2.18234;
  a3p = 0.34578;
  d2p = 0.18191;
  f1p = 0.09588;
  gam1p = 0.40119;
  amp = 0;
  dawn = 12;
  dusk = 24;

  // Assignment rules:
  sFrq_tot := PF + E2F + E1F;
  lFrq_tot := PFp + E2Fp + E1Fp;
  Frq_tot := sFrq_tot + lFrq_tot;
  WC1_tot := PW + PWL + E1W + E2W;

  // Reactions:
  MFtrn: => MF; a1*PWL^n/((1 + (PF + PFp)/b1)*(PWL^n + b2^n)) + a2*PW^m/((1 + (PF + PFp)/b3)*(PW^m + b4^m));  // modifiers: PF, PFp, PW, PWL; isVersionOf GO:0006351
  MFdeg: MF => ; d1*MF/(MF + b5);  // isVersionOf GO:0006402
  E1Ftrl: => E1F; a3*MF;  // modifiers: MF; isVersionOf GO:0006412
  E1Fdeg: E1F => ; gam1*E1F;  // isVersionOf GO:0030163
  E2Ftrl: E1F => E2F; f1*E1F;  // isVersionOf GO:0016485
  E2Fdeg: E2F => ; gam1*E2F;  // isVersionOf GO:0030163
  PFtrl: E2F => PF; f1*E2F;  // isVersionOf GO:0006606
  PFdeg: PF => ; d2*PF;  // isVersionOf GO:0030163
  MWtrn: => MW; a4 + a5*PWL^k/(PWL^k + b7^k);  // modifiers: PWL; isVersionOf GO:0006351
  MWdeg: MW => ; d3*MW/(MW + b8);  // isVersionOf GO:0006402
  E1Wtrl: => E1W; (a6 + a7*(PF + PFp))*MW;  // modifiers: MW, PF, PFp; isVersionOf GO:0006412
  E1Wdeg: E1W => ; gam2*E1W;  // isVersionOf GO:0030163
  E2Wtrl: E1W => E2W; f2*E1W;  // isVersionOf GO:0016485
  E2Wdeg: E2W => ; gam2*E2W;  // isVersionOf GO:0030163
  PWtrl: E2W => PW; f2*E2W;  // isVersionOf GO:0006606
  PWdeg: PW => ; d4*PW/(PW + b9);  // isVersionOf GO:0030163
  PWtrs: PW -> PWL; r1*amp*PW*(1 + tanh(24*(time - 24*floor(time/24) - dawn)))*(1 - tanh(24*(time - 24*floor(time/24) - dusk)))/4 - r2*PWL;  // isVersionOf GO:0051091 GO:0016037
  PWLdeg: PWL => ; d5*PWL/(PWL + b10);  // isVersionOf GO:0030163
  E1Fptrl: => E1Fp; a3p*MF;  // modifiers: MF; isVersionOf GO:0006412
  E1Fpdeg: E1Fp => ; gam1p*E1Fp;  // isVersionOf GO:0030163
  E2Fptrl: E1Fp => E2Fp; f1p*E1Fp;  // isVersionOf GO:0016485
  E2Fpdeg: E2Fp => ; gam1p*E2Fp;  // isVersionOf GO:0030163
  PFptrl: E2Fp => PFp; f1p*E2Fp;  // isVersionOf GO:0006606
  PFpdeg: PFp => ; d2p*PFp;  // isVersionOf GO:0030163

  // Unit definitions:
  unit time = 3600 second; time is "hours";
  unit substance = dimensionless; substance is "arbitrary_units";
end
